** HAMK University of Applied Scince ===========================================
**
**          Numerical analaysis techniques for structural fire safety design of steel structures
**          FE-SFS prject
**
**          HAMK TECH Research Unit
**
**          Readable input files
**
**==============================================================================
**===============================================================================
**          Case example:   Direct exposre of simple beam (case 1)
**          Analyses types:  Thermal Analyses
**
**
**==============================================================================
**===============================================================================
*Heading
** Job name: 2D_temp Model name: 2D_temp
** Generated by: Abaqus/CAE 2020
*Preprint, echo=NO, model=NO, history=NO, contact=NO
**
**** ----------------------------------------------------------------** ----------------------------------------------------------------** ----------------------------------------------------------------
** PARTS defination: This section is to create part and instances. Abaqus/CAE or other pre-processor like Hypermesh can be used to define parts
**
** Data lines to part defination using *PART keyword and name of the part.
** Data lines to define node number and node location (x-y-z co-ordinates)
*Part, name=Part-1
*Node
      1,         65.5,   8.08333302
      2,         65.5, -0.916666687
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** ----------------------------------------------------------------** ----------------------------------------------------------------** ----------------------------------------------------------------
**Data lines to define element number and node number and element type. Beam element B31-a node node linear beam in space is define here.
**
*Element, type=DC2D4
 1,   1,  17, 339,  58
 2,  17,  18, 340, 339
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** ----------------------------------------------------------------** ----------------------------------------------------------------** ----------------------------------------------------------------
**Data line to define element node and elements sets
*Nset, nset=Set-4, generate
   1,  572,    1
*Elset, elset=Set-4, generate
   1,  406,    1
** Section: Section-beam
*Solid Section, elset=Set-4, material=S355_thermal
,
*End Part
** ----------------------------------------------------------------** ----------------------------------------------------------------** ----------------------------------------------------------------
**
**
** ASSEMBLY
**
*Assembly, name=Assembly
**
*Instance, name=Part-1-1, part=Part-1
          0.,     0.916667,           0.
*End Instance
**
*Node
      1,         59.5,         125.,           0.
*Node
      2,        29.75,           9.,           0.
*Node
      3,        29.75,         241.,           0.
*Nset, nset=all_nodes, instance=Part-1-1, generate
   1,  572,    1
*Elset, elset=all_nodes, instance=Part-1-1, generate
   1,  406,    1
*Elset, elset=_exposed_S2, internal, instance=Part-1-1
   3,   6,   9,  12,  15,  18
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*Elset, elset=_exposed_S3, internal, instance=Part-1-1
  58,  59,  60, 118, 119, 120, 178, 179, 180, 238, 239, 240, 405, 406
*Elset, elset=_exposed_S4, internal, instance=Part-1-1
   1,   4,   7,  10,  13,  16
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*Surface, type=ELEMENT, name=exposed
_exposed_S2, S2
_exposed_S3, S3
_exposed_S4, S4
*Elset, elset=_unexposed_S2, internal, instance=Part-1-1, generate
 123,  180,    3
*Elset, elset=_unexposed_S4, internal, instance=Part-1-1, generate
 181,  238,    3
*Elset, elset=_unexposed_S1, internal, instance=Part-1-1
 241, 242
*Surface, type=ELEMENT, name=unexposed
_unexposed_S2, S2
_unexposed_S4, S4
_unexposed_S1, S1
*End Assembly
** ----------------------------------------------------------------** ----------------------------------------------------------------** ----------------------------------------------------------------
** Data line to defined time-temperature curve from fire response model
** Data line to define the time-temperature curve
**
*Amplitude, name=Cong_fire, time=TOTAL TIME
             0.,             20.,             24.,            200.,             75.,           335.3,            150.,            400.
           270.,            450.,            600.,            500.,            960.,            550.,           1200.,            550.
          1320.,            550.,           1380.,            600.,           1800.,           635.3,           2400.,            700.
          3000.,           741.2,           3450.,           764.7
*Amplitude, name=ISO_fire, time=TOTAL TIME
             0.,             20.,             30.,           261.1,             60.,           349.2,             90.,           404.3
           120.,           444.5,            150.,           476.2,            180.,           502.3,            210.,           524.5
           240.,           543.9,            270.,            561.,            300.,           576.4,            360.,           603.1
           420.,           625.8,            480.,           645.5,            540.,           662.8,            600.,           678.4
           720.,           705.4,            840.,           728.3,            960.,           748.2,           1080.,           765.7
          1200.,           781.4,           1500.,           814.6,           1800.,           841.8,           2400.,           884.7
          3000.,           918.1,           3600.,           945.3
**
** ----------------------------------------------------------------** ----------------------------------------------------------------** ----------------------------------------------------------------
**** MATERIALS :Materials properties definition. The name of material is defined using name=xx
** data line to define temperature-dependent conductivity
** data line to define thermal density
** data line to define temperature-dependent specific heat
**
** ----------------------------------------------------------------**
*Material, name=S355_thermal
**
** data line to define temperature-dependent conductivity
*Conductivity
54000.,  20.
50670., 100.
47340., 200.
44010., 300.
40680., 400.
37350., 500.
34020., 600.
30690., 700.
27360., 800.
27360.,1000.
** ----------------------------------------------------------------**
**data line to define thermal density
*Density
 7.85e-06,
** ----------------------------------------------------------------**
**data line to define specific heat
*Specific Heat
  4.25e+08,  20.
 4.876e+08, 100.
 5.298e+08, 200.
 5.647e+08, 300.
 6.059e+08, 400.
 6.665e+08, 500.
 7.599e+08, 600.
 1.008e+09, 700.
     5e+09, 735.
 8.033e+08, 800.
 6.504e+08, 900.
   6.5e+08,1000.
**
** ----------------------------------------------------------------** ----------------------------------------------------------------** ----------------------------------------------------------------
**
** PHYSICAL CONSTANTS :Defining physical constants
** The most essential phsyical constant like absolute zero and the Stafan Boltzmann constant are defined here.
**
*Physical Constants, absolute zero=-273.16, stefan boltzmann=5.67e-08
**
** ----------------------------------------------------------------** ----------------------------------------------------------------** ----------------------------------------------------------------
**
**
** PREDEFINED FIELDS : Defining prediefine field like initial temperature. Abaqus assume zero temperature at nodes if predefined temperature is not defined.
**
** Name: Predefined Field-1   Type: Temperature
*Initial Conditions, type=TEMPERATURE
all_nodes, 20.
** ----------------------------------------------------------------** ----------------------------------------------------------------** ----------------------------------------------------------------
**  COMMENTS ABOUT THE KEYWROD
** Defining nonlinear transient thermal analysis step
** HEAT TRANSFER, END=PERIOD, DELTMX=VALUE.
** Data line to define simulation time and incrementation definition
** Defining convection and radiation interactions
** *SFILM, AMPLITUDE=name_of_fire_curve_amplitude
** Data line to define convection surface and film coefficient
** *SRADIATE, AMPLITUDE= name_of_fire_curve_amplitude
** Data line to define radiation surface and emissivity
** Defining output requests
** *OUTPUT, FIELD
** *NODE OUTPUT
** NT,
** data line to define nodal temperature output
** Other output variables request here
** ----------------------------------------------------------------*
** STEP: fire
**
*Step, name=fire, nlgeom=NO, inc=1000
*Heat Transfer, end=PERIOD, deltmx=10.
1., 3600., 0.036, 5.,
**
** ----------------------------------------------------------------** ----------------------------------------------------------------** ----------------------------------------------------------------
** INTERACTIONS: To defined convection and radation boundary condition for surface exposed to fire or surface not exposed to fire.
**
** Interaction: convection_exposed
*Sfilm, amplitude=Cong_fire
exposed, F, 1., 25.
** Interaction: convection_unexposed
*Sfilm
unexposed, F, 20., 9.
** Interaction: radaition
*Sradiate, amplitude=Cong_fire
exposed, R, 1., 0.7
**
** ----------------------------------------------------------------** ----------------------------------------------------------------** ----------------------------------------------------------------
** OUTPUT REQUESTS
**
*Restart, write, frequency=0
**
** FIELD OUTPUT: F-Output-1
**
*Output, field
*Node Output
NT,
*Element Output, directions=YES
HFL, TEMP
*Output, history, frequency=0
*End Step
