*Heading
** Job name: structural_shell Model name: structural_shell
** Generated by: Abaqus/CAE 2020
*Preprint, echo=NO, model=NO, history=NO, contact=NO
**
**==============================================================================
**          HAMK University of Applied Scince
**
**          Numerical analaysis techniques for structural fire safety design of steel structures
**          FE-SFS prject
**
**          HAMK TECH Research Unit
**
**          Readable input files
**
**==============================================================================
**
**          Case example:   simple beam (case 1)
**          Analyses types:  Structural Analyses
**          Element types: shell element
**==============================================================================
** PARTS
**
** PARTS defination: This section is to create part and instances. Abaqus/CAE or other pre-processor like Hypermesh can be used to define parts
**This lines define part name. element types for the parts. elements sets and nodes sets in side every parts and section defination for beam or shell elements
** Each Part will begin with *Part keyword and end to *End Part keyword
** PARTS
**===============================================================================
**
*Part, name=beam
*End Part
**
**
**===============================================================================
** Data line to define assembly of the parts and other elements like spring and MASS elemets
** Create Assembly from the list of parts that are used in the model
**  It consists of name of instance used in the model, node and elements sets, surface sets, interractions , springs etc
** Each Assembly instance will begin with *Instance  keyword and end to *End Instance keyword
**===============================================================================
** ASSEMBLY
**
*Assembly, name=Assembly
**
*Instance, name=beam-1, part=beam
       -62.5,        -125.,       -4200.
**===============================================================================
** Data lines to define node number and node location (x-y-z co-ordinates)
**===============================================================================
*Node
      1,         125.,           0.,         525.
      2,         62.5,           0.,         525.
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** ----------------------------------------------------------------
**Data lines to define element number and node number and element type.
** ----------------------------------------------------------------
*Element, type=S4R
 1,   1,  37, 685,  62
 2,  37,   2,  38, 685
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*Nset, nset=web
    2,    3,    6,    9,   10,   13
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*Elset, elset=web
  131,  132,  133,  134,  135,  136
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*Nset, nset=upper_flange
    8,    9,   10,   11,   12,   13
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*Elset, elset=upper_flange
   79,   80,   81,   82,   83,   84
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*Nset, nset=lower_flange
    1,    2,    3,    4,    5,    6
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*Elset, elset=lower_flange
    1,    2,    3,    4,    5,    6
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** Section: lower_flange
*Shell Section, elset=lower_flange, material=steel_structural, temperature=5, offset=SPOS
9., 5
** Section: uppper_flange
*Shell Section, elset=upper_flange, material=steel_structural, temperature=5, offset=SNEG
9., 5
** Section: web
*Shell Section, elset=web, material=steel_structural, temperature=5
6., 5
*End Instance
**
*Nset, nset=BC-left-pin, instance=beam-1
  30,  31,  33, 589, 640
*Nset, nset=BC-restrined_nodesX, instance=beam-1
  13,  14,  27,  28,  35,  36
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*Nset, nset=BC-right-roller, instance=beam-1
   3,   4,  34,  50, 653
*Nset, nset=BC_all_restrained_nodesX, instance=beam-1
   8,   9,  10,  11,  12,  13
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*Nset, nset=all_nodes, instance=beam-1, generate
    1,  1575,     1
*Nset, nset=all_surface, instance=beam-1, generate
    1,  1575,     1
*Elset, elset=all_surface, instance=beam-1, generate
    1,  1456,     1
*Nset, nset=loads_nodes, instance=beam-1
   8,   9,  10,  11,  12,  18
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*Elset, elset=_exposed-1_SPOS, internal, instance=beam-1
    1,    2,    3,    4,    5,    6
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*Surface, type=ELEMENT, name=exposed-1
_exposed-1_SPOS, SPOS
*Elset, elset=_exposed-2_SNEG, internal, instance=beam-1
    1,    2,    3,    4,    5,    6
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*Surface, type=ELEMENT, name=exposed-2
_exposed-2_SNEG, SNEG
*Elset, elset=_exposed-top_SPOS, internal, instance=beam-1
   79,   80,   81,   82,   83,   84
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*Surface, type=ELEMENT, name=exposed-top
_exposed-top_SPOS, SPOS
*Elset, elset=_unexposed-top_SNEG, internal, instance=beam-1
   79,   80,   81,   82,   83,   84
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*Surface, type=ELEMENT, name=unexposed-top
_unexposed-top_SNEG, SNEG
*End Assembly
**===============================================================================
**Data line to defined temperature histories from thermal response model.
**Data line to define the time-temperature curve for beam sections temperature points
** Data line to define mechanical loading curve for mechanical loading step and temperature loading step.
** Data line to define the fire temperature curve  using keyword *Amplitdue. Simulation time vs temperature
**===============================================================================
*Amplitude, name=cong_fire, time=TOTAL TIME
             0.,             20.,             24.,            200.,             75.,           335.3,            150.,            400.
           270.,            450.,            600.,            500.,            960.,            550.,           1200.,            550.
          1320.,            550.,           1380.,            600.,           1800.,           635.3,           2400.,            700.
          3000.,           741.2,           3450.,           764.7
*Amplitude, name=loading_curve, time=TOTAL TIME
             0.,              0.,              2.,              1.,             20.,              1.
*Amplitude, name=temp_web_middle_result_from_2D_temp_analysis, time=TOTAL TIME
             0.,              0.,              2.,              0.,           2.005,      0.02723374,            2.01,     0.027268062
          2.015,     0.027322271,           2.025,     0.027514209,           2.045,     0.028250413,            2.07,     0.029757454
          2.095,     0.031894601,            2.12,     0.034711128,           2.145,     0.037804479,            2.17,     0.041147485
          2.195,     0.044737365,            2.22,     0.048575046,           2.245,     0.052662614,            2.27,      0.05700272
          2.295,     0.061598387,            2.32,     0.066452947,           2.345,     0.071569985,            2.37,     0.076953315
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         19.995,     0.999957676,             20.,              1.
**
** MATERIALS
**===============================================================================
** ** ----------------------------------------------------------------** ----------------------------------------------------------------** ----------------------------------------------------------------
** MATERIALS: Materials properties definition
**===============================================================================
***MATERIAL, NAME=NAME_OF_MATERIAL
**DENSITY
**data line to define density of the material
**EXPANSION
**data line to define temperature-dependent expansion
**ELASTIC
**data line to define temperature-dependent elasticity
**PLASTIC
**data line to define temperature-dependent plasticity
**..
**similar definition approaches for defining multiple material properties)
** ----------------------------------------------------------------*
**===============================================================================
**
*Material, name=steel_structural
*Density
 7.85e-09,
*Elastic
200000.,  0.3,  20.
200000.,  0.3, 100.
180000.,  0.3, 200.
160000.,  0.3, 300.
140000.,  0.3, 400.
120000.,  0.3, 500.
 62000.,  0.3, 600.
 26000.,  0.3, 700.
 18000.,  0.3, 800.
 13500.,  0.3, 900.
  9000.,  0.3,1000.
  4500.,  0.3,1100.
     1.,  0.3,1200.
*Expansion
    1.2e-05,  20.
  1.248e-05, 100.
  1.288e-05, 200.
  1.328e-05, 300.
  1.368e-05, 400.
  1.408e-05, 500.
  1.448e-05, 600.
  1.488e-05, 700.
  1.508e-05, 750.
 1.4103e-05, 800.
 1.3095e-05, 860.
 1.3409e-05, 900.
 1.4082e-05,1000.
  1.463e-05,1100.
*Plastic
  304.8,         0.,        20.
  323.1, 0.00019707,        20.
  338.3,  0.0006361,        20.
   357.,   0.001561,        20.
  370.1,   0.002507,        20.
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   12.2,       0.45,      1000.
**
** PHYSICAL CONSTANTS
**
*Physical Constants, absolute zero=-273.16, stefan boltzmann=5.67e-08
**
** BOUNDARY CONDITIONS
**
**===============================================================================
** **Data line to define displacement, rotation, and symmetry boundary conditions.
**===============================================================================
** Name: BC-1 Type: Displacement/Rotation
*Boundary
BC-left-pin, 1, 1
BC-left-pin, 2, 2
BC-left-pin, 3, 3
** Name: BC-2 Type: Displacement/Rotation
*Boundary
BC-right-roller, 2, 2
** Name: BC-3 Type: Displacement/Rotation
*Boundary
BC_all_restrained_nodesX, 1, 1
**
** PREDEFINED FIELDS
**===============================================================================
** Date line to define intial temperature fields and temperature fields due to fire.
**===============================================================================
**
** Name: initial_temp   Type: Temperature
*Initial Conditions, type=TEMPERATURE
all_nodes, 20.
** ----------------------------------------------------------------
**
**===============================================================================
**
** STEP: mech-loading: Defining mechanical loading step 1
** *DYNAMIC, EXPLICIT
** Data lines to define explicit dynamics parameters and termination time
** *BULK VISCOSITY
** Data lines to define bulk viscosity parameters
** ----------------------------------------------------------------
** Defining loading
** *CLOAD, AMPLITUDE=NAME_OF_LOAD_CURVE
** Data line to define load amplitude and location (node or element surface)
** Data lines for output request
** *OUTPUT, FIELD, TIME INTERVAL=0.1, TIME MARKS=YES
** *NODE OUTPUT
** Data line to define quantities for nodal output request
** *ELEMENT OUTPUT
** Data line to define quantities for element output request
** Data line for history output:
** *OUTPUT, HISTORY, VARIABLE=NAME_OF_VARIABLES, TIME INTERVAL=0.1
**===============================================================================
** STEP: mechanical_loading
**
*Step, name=mechanical_loading, nlgeom=YES
*Dynamic, Explicit
, 2.
*Bulk Viscosity
0.06, 1.2
**
** LOADS
**
** Name: mechanical_loading   Type: Concentrated force
*Cload, amplitude=loading_curve
loads_nodes, 2, -2100.
**
** OUTPUT REQUESTS
**
*Restart, write, number interval=1, time marks=NO
**
** FIELD OUTPUT: F-Output-1
**
*Output, field, time interval=0.1
*Node Output
A, U, V
*Element Output, directions=YES
EVF, TEMP
**
** HISTORY OUTPUT: H-Output-1
**
*Output, history, variable=PRESELECT
*End Step
** ----------------------------------------------------------------
**
** STEP: fire-heating
**
*Step, name=fire-heating, nlgeom=YES
*Dynamic, Explicit
, 18.
*Bulk Viscosity
0.06, 1.2
**
** PREDEFINED FIELDS
**
** Name: fire_heating   Type: Temperature
*Temperature, file="C:\Users\dilip1\Desktop\Feedback input files\final_test_simple beam\temperature_shell.odb", bstep=1, binc=1
**
** OUTPUT REQUESTS
**
*Restart, write, number interval=1, time marks=NO
**
** FIELD OUTPUT: F-Output-1
**
*Output, field, time interval=0.1
*Node Output
A, U, V
*Element Output, directions=YES
EVF, TEMP
**
** HISTORY OUTPUT: H-Output-1
**
*Output, history, variable=PRESELECT
*End Step
