*Heading
** Job name: structural_beam_buckle Model name: structural_beam_buckle
** Generated by: Abaqus/CAE 2020
*Preprint, echo=NO, model=NO, history=NO, contact=NO
**
**==============================================================================
**          HAMK University of Applied Scince
**
**          Numerical analaysis techniques for structural fire safety design of steel structures
**          FE-SFS prject
**
**          HAMK TECH Research Unit
**
**          Readable input files
**
**==============================================================================
**
**          Case example:   Restrained column (case 3)
**          Analyses types:  Buckling Analyses
**          Element types: beam element
**==============================================================================
**===============================================================================
** PARTS
**
*Part, name=column
*End Part
**
*Part, name=descrete_mass
*End Part
**
*Part, name=lower_plate
*End Part
**
*Part, name=upper_plate
*End Part
**
**
** ASSEMBLY
**
*Assembly, name=Assembly
**
*Instance, name=column-1, part=column
*Node
      1,           0.,           0.,           0.
      2,           0.,          25.,           0.
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*Element, type=B31
 1,  1,  2
 2,  2,  3
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*Nset, nset=column, generate
  1,  73,   1
*Elset, elset=column, generate
  1,  72,   1
** Section: column  Profile: column
*Beam Section, elset=column, material=steel_nonlinear, temperature=GRADIENTS, section=I
60., 120., 76., 76., 7.6, 7.6, 4.2
1.,0.,0.
*End Instance
**
*Instance, name=descrete_mass-1, part=descrete_mass
*Node
      1,           0.,        1900.,           0.
*Nset, nset=descrete_mass-1-RefPt_, internal
1,
*Nset, nset=Set-1
 1,
*Element, type=MASS, elset=Set-1_Inertia-1_
1, 1
*Mass, elset=Set-1_Inertia-1_
1e-05,
*End Instance
**
*Instance, name=lower_plate-1, part=lower_plate
*Node
      1,        -375.,           0.,           0.
      2,           0.,           0.,           0.
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*Element, type=B31
 1,  1,  4
 2,  4,  5
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*Nset, nset=lower_plate, generate
  1,  31,   1
*Elset, elset=lower_plate, generate
  1,  30,   1
** Section: lower_plate  Profile: plate
*Beam Section, elset=lower_plate, material=steel_linear, temperature=GRADIENTS, section=RECT
200., 40.
0.,0.,-1.
*End Instance
**
*Instance, name=upper_plate-1, part=upper_plate
*Node
      1,        -375.,        1800.,           0.
      2,           0.,        1800.,           0.
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*Element, type=B31
 1,  1,  4
 2,  4,  5
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*Nset, nset=upper_plate, generate
  1,  31,   1
*Elset, elset=upper_plate, generate
  1,  30,   1
** Section: uppper_plate  Profile: plate
*Beam Section, elset=upper_plate, material=steel_linear, temperature=GRADIENTS, section=RECT
200., 40.
0.,0.,-1.
*End Instance
**
*Nset, nset=all_nodes, instance=column-1, generate
  1,  73,   1
*Nset, nset=all_nodes, instance=lower_plate-1, generate
  1,  31,   1
*Nset, nset=all_nodes, instance=upper_plate-1, generate
  1,  31,   1
*Nset, nset=heatzone, instance=column-1, generate
  2,  72,   1
*Nset, nset=load_point, instance=upper_plate-1
 2,
*Nset, nset=lower_column, instance=lower_plate-1
 2,
*Nset, nset=lower_plate_left_right, instance=lower_plate-1
 1, 3
*Nset, nset=s_Set-3, instance=upper_plate-1
 2,
*Nset, nset=s_Set-4, instance=lower_plate-1
 2,
*Nset, nset=spring_node, instance=descrete_mass-1
 1,
*Nset, nset=upper_column, instance=upper_plate-1
 2,
*Nset, nset=upper_plate_left_right, instance=upper_plate-1
 1, 3
*Elset, elset=_m_Surf-1_END2, internal, instance=column-1
 72,
*Surface, type=ELEMENT, name=m_Surf-1
_m_Surf-1_END2, END2
*Elset, elset=_m_Surf-2_END1, internal, instance=column-1
 1,
*Surface, type=ELEMENT, name=m_Surf-2
_m_Surf-2_END1, END1
*Surface, type=NODE, name=s_Set-3_CNS_, internal
s_Set-3, 1.
*Surface, type=NODE, name=s_Set-4_CNS_, internal
s_Set-4, 1.
** Constraint: Constraint-1
*Tie, name=Constraint-1, adjust=yes, position tolerance=5.
s_Set-3_CNS_, m_Surf-1
** Constraint: Constraint-2
*Tie, name=Constraint-2, adjust=yes, position tolerance=5.
s_Set-4_CNS_, m_Surf-2
*Spring, elset=Springs-spring

32700.
*Element, type=SpringA, elset=Springs-spring
1, column-1.73, descrete_mass-1.1
*End Assembly
*Amplitude, name=column-temperature
             0.,             20.,              2.,             20.,             2.6,             58.,             3.2,            95.3
            3.8,           125.6,             4.4,           160.4,              5.,           190.7,             5.6,           225.5
            6.2,           255.8,             6.8,           290.6,             7.4,           318.5,              8.,           346.4
            8.6,            372.,             9.2,           397.6,             9.8,           416.2,            10.4,           441.8
*Amplitude, name=loading_curve, time=TOTAL TIME
             0.,              0.,              2.,              1.,            11.4,              1.
**
** MATERIALS
**
*Material, name=steel_linear
*Density
 7.85e-09,
*Elastic
200000., 0.3
*Material, name=steel_nonlinear
*Density
 7.85e-09,
*Elastic
200000.,  0.3,  20.
200000.,  0.3, 100.
180000.,  0.3, 200.
160000.,  0.3, 300.
140000.,  0.3, 400.
120000.,  0.3, 500.
 62000.,  0.3, 600.
 26000.,  0.3, 700.
 18000.,  0.3, 800.
 13500.,  0.3, 900.
  9000.,  0.3,1000.
  4500.,  0.3,1100.
     1.,  0.3,1200.
*Expansion
    1.2e-05,  20.
  1.248e-05, 100.
  1.288e-05, 200.
  1.328e-05, 300.
  1.368e-05, 400.
  1.408e-05, 500.
  1.448e-05, 600.
  1.488e-05, 700.
  1.508e-05, 750.
 1.4103e-05, 800.
 1.3095e-05, 860.
 1.3409e-05, 900.
 1.4082e-05,1000.
  1.463e-05,1100.
*Plastic
  304.8,         0.,        20.
  323.1, 0.00019707,        20.
  338.3,  0.0006361,        20.
   357.,   0.001561,        20.
  370.1,   0.002507,        20.
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   12.2,       0.45,      1000.
**
** INTERACTION PROPERTIES
**
*Surface Interaction, name=contact
1.,
*Surface Behavior, pressure-overclosure=HARD
**
** BOUNDARY CONDITIONS
**
** Name: lower_column Type: Displacement/Rotation
*Boundary
lower_column, 1, 1
lower_column, 2, 2
lower_column, 3, 3
lower_column, 5, 5
** Name: lower_plate_left_right Type: Displacement/Rotation
*Boundary
lower_plate_left_right, 2, 2
lower_plate_left_right, 3, 3
** Name: upper_column Type: Displacement/Rotation
*Boundary
upper_column, 1, 1
upper_column, 3, 3
upper_column, 5, 5
**
** PREDEFINED FIELDS
**
** Name: intial_temp   Type: Temperature
*Initial Conditions, type=TEMPERATURE
all_nodes, 20.
** ----------------------------------------------------------------
**
** STEP: buckle
**
*Step, name=buckle, nlgeom=NO, perturbation
*Buckle
3, , 6, 30
**
** BOUNDARY CONDITIONS
**
** Name: lower_column Type: Displacement/Rotation
*Boundary, op=NEW, load case=1
lower_column, 1, 1
lower_column, 2, 2
lower_column, 3, 3
lower_column, 5, 5
*Boundary, op=NEW, load case=2
lower_column, 1, 1
lower_column, 2, 2
lower_column, 3, 3
lower_column, 5, 5
** Name: lower_plate_left_right Type: Displacement/Rotation
*Boundary, op=NEW, load case=1
lower_plate_left_right, 2, 2
lower_plate_left_right, 3, 3
*Boundary, op=NEW, load case=2
lower_plate_left_right, 2, 2
lower_plate_left_right, 3, 3
** Name: upper_column Type: Displacement/Rotation
*Boundary, op=NEW, load case=1
upper_column, 1, 1
upper_column, 3, 3
upper_column, 5, 5
*Boundary, op=NEW, load case=2
upper_column, 1, 1
upper_column, 3, 3
upper_column, 5, 5
**
** LOADS
**
** Name: Load-1   Type: Concentrated force
*Cload
load_point, 2, -1.
**
** OUTPUT REQUESTS
**
*Restart, write, frequency=0
**
** FIELD OUTPUT: F-Output-1
**
*Output, field, variable=PRESELECT
*NODE FIL
U,
*End Step
