*Heading
** Job name: input_files_restrained_column_structural_shell Model name: structural_shell
** Generated by: Abaqus/CAE 2020
*Preprint, echo=NO, model=NO, history=NO, contact=NO
**
**==============================================================================
**          HAMK University of Applied Scince
**
**          Numerical analaysis techniques for structural fire safety design of steel structures
**          FE-SFS prject
**
**          HAMK TECH Research Unit
**
**          Readable input files
**
**==============================================================================
**
**          Case example:   Restrained column (case 3)
**          Analyses types:  Structural Analyses
**          Element types: shell element
**==============================================================================
**===============================================================================
** PARTS
**
** PARTS defination: This section is to create part and instances. Abaqus/CAE or other pre-processor like Hypermesh can be used to define parts
**This lines define part name. element types for the parts. elements sets and nodes sets in side every parts and section defination for beam or shell elements
** Each Part will begin with *Part keyword and end to *End Part keyword
**===============================================================================
*Part, name=COLUMN-1
**===============================================================================
** Data lines to define node number and node location (x-y-z co-ordinates)
**===============================================================================
*Node
      1,          38.,        1775.,         -60.
      2,           0.,        1775.,         -60.
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** ----------------------------------------------------------------** ----------------------------------------------------------------** ----------------------------------------------------------------
**Data lines to define element number and node number and element type. Element S4RSW is define here.
**
*Element, type=S4RSW
   1,    1,   25,   26,    4
   2,   25,    2,    3,   26
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*Nset, nset=WEB
    2,    3,    6,    8,    9,   14
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*Elset, elset=WEB
  179,  180,  181,  182,  183,  184
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*Nset, nset=UPPER_FLANGE
    8,    9,   10,   11,   12,   13
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*Elset, elset=UPPER_FLANGE
  707,  708,  709,  710,  711,  712
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*Nset, nset=LOWER_FLANGE
    1,    2,    3,    4,    5,    6
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*Elset, elset=LOWER_FLANGE
    1,    2,    3,    4,    5,    6
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** Section: Section-1-LOWER_FLANGE
*Shell Section, elset=LOWER_FLANGE, material=STEEL_NONLINEAR
7.6, 5
** Section: Section-2-WEB
*Shell Section, elset=WEB, material=STEEL_NONLINEAR
4.2, 5
** Section: Section-3-UPPER_FLANGE
*Shell Section, elset=UPPER_FLANGE, material=STEEL_NONLINEAR
7.6, 5
*End Part
**
**===============================================================================
** Define discrete parts,
**  It consists of name of parts used in the model, node and elements sets, surface sets, interractions , springs etc
** Each part will begin with *Part  keyword and end to *End Part keyword
**===============================================================================
*Part, name=DISCRETE_POINT_1-1
*Node
      1,           0.,         -50.,           0.
*Nset, nset=DISCRETE_POINT_1-1-REFPT_, internal
 1,
*Nset, nset=SET-1
 1,
*Nset, nset=_PickedSet5, internal
 1,
*Element, type=MASS, elset=_PickedSet5_Interia-3_MASS__
1, 1
*Mass, elset=_PickedSet5_Interia-3_MASS__
0.0001,
*End Part
**
*Part, name=DISCRETE_POINT_ENDSPRING-1
*Node
      1,           0.,        1950.,           0.
*Nset, nset=DISCRETE_POINT_ENDSPRING-1-REFPT_, internal
 1,
*Nset, nset=SET-1
 1,
*Nset, nset=_PickedSet5, internal
 1,
*Element, type=MASS, elset=_PickedSet5_Interia-1_MASS__
1, 1
*Mass, elset=_PickedSet5_Interia-1_MASS__
0.0001,
*End Part
**
*Part, name=DISCRETE_POINT_LOADING_POINT-1
*Node
      1,           0.,        1850.,           0.
*Nset, nset=DISCRETE_POINT_LOADING_POINT-1-REFPT_, internal
 1,
*Nset, nset=SET-1
 1,
*Nset, nset=_PickedSet5, internal
 1,
*Element, type=MASS, elset=_PickedSet5_Interia-2_MASS__
1, 1
*Mass, elset=_PickedSet5_Interia-2_MASS__
0.0001,
*End Part
**
*Part, name=LOWER_PLATE-1
*Node
      1,         -38.,           0.,        -100.
      2,         -38.,           0.,         -60.
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*Element, type=S4RSW
  1,   1,  26, 226,  59
  2,  26,   2,  27, 226
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*Nset, nset=LOWER_PLATE, generate
   1,  429,    1
*Elset, elset=LOWER_PLATE, generate
   1,  380,    1
** Section: Section-4-LOWER_PLATE
*Shell Section, elset=LOWER_PLATE, material=STEEL_LINEAR
20., 5
*End Part
**
*Part, name=UPPER_PLATE-1
*Node
      1,         -38.,        1800.,        -100.
      2,         -38.,        1800.,         -60.
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*Element, type=S4RSW
  1,   1,  26, 226,  59
  2,  26,   2,  27, 226
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*Nset, nset=UPPER_PLATE, generate
   1,  429,    1
*Elset, elset=UPPER_PLATE, generate
   1,  380,    1
** Section: Section-5-UPPER_PLATE
*Shell Section, elset=UPPER_PLATE, material=STEEL_LINEAR
20., 5
*End Part
**
**
** ASSEMBLY
**
**===============================================================================
** Data line to define assembly of the parts and other elements like spring and MASS elemets
** Create Assembly from the list of parts that are used in the model
**  It consists of name of instance used in the model, node and elements sets, surface sets, interractions , springs etc
** Each Assembly instance will begin with *Instance  keyword and end to *End Instance keyword
**===============================================================================
*Assembly, name=Assembly
**
*Instance, name=COLUMN-1, part=COLUMN-1
*End Instance
**
*Instance, name=DISCRETE_POINT_ENDSPRING-1, part=DISCRETE_POINT_ENDSPRING-1
*End Instance
**
*Instance, name=DISCRETE_POINT_LOADING_POINT-1, part=DISCRETE_POINT_LOADING_POINT-1
*End Instance
**
*Instance, name=LOWER_PLATE-1, part=LOWER_PLATE-1
*End Instance
**
*Instance, name=UPPER_PLATE-1, part=UPPER_PLATE-1
*End Instance
**
*Instance, name=DISCRETE_POINT_1-1, part=DISCRETE_POINT_1-1
*End Instance
**
*Nset, nset=ALL_NODES, instance=COLUMN-1, generate
    1,  1365,     1
*Nset, nset=ALL_NODES, instance=LOWER_PLATE-1, generate
   1,  429,    1
*Nset, nset=ALL_NODES, instance=UPPER_PLATE-1, generate
   1,  429,    1
*Nset, nset=HEATZONE, instance=COLUMN-1
    1,    2,    5,    6,    7,    8
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*Elset, elset=HEATZONE, instance=COLUMN-1
    3,    4,    5,    6,    7,    8
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*Nset, nset=LOWER_LEFT_RIGHT, instance=LOWER_PLATE-1
   3,   4,   7,   8,  12,  13
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*Elset, elset=LOWER_LEFT_RIGHT, instance=LOWER_PLATE-1
  33,  34,  67,  68,  73,  90
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*Nset, nset=MPC_LOWER_PLATE, instance=LOWER_PLATE-1
   2,   5,  10,  14,  19,  20,  24,  96, 172, 174, 175, 214, 222, 223, 224
*Elset, elset=MPC_LOWER_PLATE, instance=LOWER_PLATE-1
  69,  71, 209, 211, 213, 215
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*Nset, nset=MPC_UPPER_PLATE, instance=UPPER_PLATE-1
   2,   5,  10,  14,  19,  20,  24,  96, 172, 174, 175, 214, 222, 223, 224
*Elset, elset=MPC_UPPER_PLATE, instance=UPPER_PLATE-1
  69,  71, 209, 211, 213, 215
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*Nset, nset=TIE_LOWER_COLUMN, instance=COLUMN-1
  16,  17,  18,  19,  21,  24, 479, 480, 487, 576, 577, 578, 579, 580, 582
*Elset, elset=TIE_LOWER_COLUMN, instance=COLUMN-1
 1061, 1062, 1063, 1064, 1071, 1072, 1251, 1252, 1253, 1254, 1255, 1256, 1259, 1260
*Nset, nset=TIE_UPPER_COLUMN, instance=COLUMN-1
   3,   4,  14,  15,  22,  23,  26, 478, 481, 482, 483, 484, 485, 575, 581
*Elset, elset=TIE_UPPER_COLUMN, instance=COLUMN-1
    1,    2, 1059, 1060, 1065, 1066, 1067, 1068, 1069, 1070, 1249, 1250, 1257, 1258
*Nset, nset=TOP_PLATE_LEFT_RIGHT, instance=UPPER_PLATE-1
   3,   4,   7,   8,  12,  13
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*Nset, nset=TIE_LOWER_COLUMN_CNS_, internal, instance=COLUMN-1
  16,  17,  18,  19,  21,  24, 479, 480, 487, 576, 577, 578, 579, 580, 582
*Nset, nset=TIE_UPPER_COLUMN_CNS_, internal, instance=COLUMN-1
   3,   4,  14,  15,  22,  23,  26, 478, 481, 482, 483, 484, 485, 575, 581
*Elset, elset=_LOWER_PLATE_SNEG, internal, instance=LOWER_PLATE-1, generate
   1,  380,    1
*Nset, nset=_M40, internal, instance=UPPER_PLATE-1, generate
   1,  429,    1
*Nset, nset=_M40, internal, instance=COLUMN-1
   3,   4,  14,  15,  16,  17
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*Nset, nset=_M40, internal, instance=LOWER_PLATE-1, generate
   1,  429,    1
*Elset, elset=_UPPER_PLATE_SNEG, internal, instance=UPPER_PLATE-1, generate
   1,  380,    1
*Surface, type=ELEMENT, name=LOWER_PLATE
_LOWER_PLATE_SNEG, SNEG
*Surface, type=ELEMENT, name=UPPER_PLATE
_UPPER_PLATE_SNEG, SNEG
*Surface, type=NODE, name=TIE_UPPER_COLUMN_CNS__CNS_, internal
TIE_UPPER_COLUMN_CNS_, 1.
*Surface, type=NODE, name=TIE_LOWER_COLUMN_CNS__CNS_, internal
TIE_LOWER_COLUMN_CNS_, 1.
*Surface, type=NODE, name=MPC_UPPER_PLATE_CNS_, internal
MPC_UPPER_PLATE, 1.
*Surface, type=NODE, name=MPC_LOWER_PLATE_CNS_, internal
MPC_LOWER_PLATE, 1.
** Constraint: CONSTRAINT-3-1
*Tie, name=CONSTRAINT-3-1, adjust=yes, position tolerance=5.
TIE_UPPER_COLUMN_CNS__CNS_, UPPER_PLATE
** Constraint: CONSTRAINT-4-1
*Tie, name=CONSTRAINT-4-1, adjust=yes, position tolerance=5.
TIE_LOWER_COLUMN_CNS__CNS_, LOWER_PLATE
** Constraint: MPC-Constraint-1
*MPC
BEAM, MPC_UPPER_PLATE, DISCRETE_POINT_LOADING_POINT-1.SET-1
** Constraint: MPC-Constraint-2
*MPC
BEAM, MPC_LOWER_PLATE, DISCRETE_POINT_1-1.SET-1
*Spring, elset=SPRINGS-SPRING-spring

32700.
*Element, type=SpringA, elset=SPRINGS-SPRING-spring
1, DISCRETE_POINT_LOADING_POINT-1.1, DISCRETE_POINT_ENDSPRING-1.1
*End Assembly
**===============================================================================
**Data line to defined temperature histories from thermal response model.
**Data line to define the time-temperature curve for beam sections temperature points
** Data line to define mechanical loading curve for mechanical loading step and temperature loading step.
** Data line to define the fire temperature curve  using keyword *Amplitdue. Simulation time vs temperature
**===============================================================================
*Amplitude, name=COLUMN-TEMPERATURE, time=TOTAL TIME
             0.,             20.,              2.,             20.,             2.6,             58.,             3.2,            95.3
            3.8,           125.6,             4.4,           160.4,              5.,           190.7,             5.6,           225.5
            6.2,           255.8,             6.8,           290.6,             7.4,           318.5,              8.,           346.4
            8.6,            372.,             9.2,           397.6,             9.8,           416.2,            10.4,           441.8
**===============================================================================
** Data line to define the loading curve  using keyword *Amplitdue. Simulation time vs load amplitude
**===============================================================================
*Amplitude, name=LOADING_CURVE, time=TOTAL TIME
             0.,              0.,              2.,              1.,            10.4,              1.
**
** MATERIALS
**
**===============================================================================
** ** ----------------------------------------------------------------** ----------------------------------------------------------------** ----------------------------------------------------------------
** MATERIALS: Materials properties definition
**===============================================================================
***MATERIAL, NAME=NAME_OF_MATERIAL
**DENSITY
**data line to define density of the material
**EXPANSION
**data line to define temperature-dependent expansion
**ELASTIC
**data line to define temperature-dependent elasticity
**PLASTIC
**data line to define temperature-dependent plasticity
**..
**similar definition approaches for defining multiple material properties)
** ----------------------------------------------------------------*
**===============================================================================
**
*Material, name=STEEL_LINEAR
*Density
 7.85e-09,
*Elastic
200000., 0.3
*Material, name=STEEL_NONLINEAR
*Density
 7.85e-09,
*Elastic
200000.,  0.3,  20.
200000.,  0.3, 100.
180000.,  0.3, 200.
160000.,  0.3, 300.
140000.,  0.3, 400.
120000.,  0.3, 500.
 62000.,  0.3, 600.
 26000.,  0.3, 700.
 18000.,  0.3, 800.
 13500.,  0.3, 900.
  9000.,  0.3,1000.
  4500.,  0.3,1100.
     1.,  0.3,1200.
*Expansion
    1.2e-05,  20.
  1.248e-05, 100.
  1.288e-05, 200.
  1.328e-05, 300.
  1.368e-05, 400.
  1.408e-05, 500.
  1.448e-05, 600.
  1.488e-05, 700.
  1.508e-05, 750.
 1.4103e-05, 800.
 1.3095e-05, 860.
 1.3409e-05, 900.
 1.4082e-05,1000.
  1.463e-05,1100.
*Plastic
  304.8,         0.,        20.
  323.1, 0.00019707,        20.
  338.3,  0.0006361,        20.
   357.,   0.001561,        20.
  370.1,   0.002507,        20.
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   12.2,       0.45,      1000.
**
** INTERACTION PROPERTIES
**
**===============================================================================
** Data line to define interaction properties, here  we define contacts, connecter elements, spring elements , MPC constrained and Tie constrained etc
**===============================================================================
**
*Surface Interaction, name=INTPROP-1
*Surface Behavior, pressure-overclosure=HARD
**
** BOUNDARY CONDITIONS
**
**===============================================================================
** **Data line to define displacement, rotation, and symmetry boundary conditions.
**===============================================================================
** Name: Disp-BC-1 Type: Displacement/Rotation
*Boundary
DISCRETE_POINT_1-1.SET-1, 1, 1
** Name: Disp-BC-2 Type: Displacement/Rotation
*Boundary
DISCRETE_POINT_1-1.SET-1, 2, 2
** Name: Disp-BC-3 Type: Displacement/Rotation
*Boundary
DISCRETE_POINT_1-1.SET-1, 3, 3
** Name: Disp-BC-4 Type: Displacement/Rotation
*Boundary
DISCRETE_POINT_1-1.SET-1, 5, 5
** Name: Disp-BC-5 Type: Displacement/Rotation
*Boundary
DISCRETE_POINT_LOADING_POINT-1.SET-1, 1, 1
** Name: Disp-BC-6 Type: Displacement/Rotation
*Boundary
DISCRETE_POINT_LOADING_POINT-1.SET-1, 3, 3
** Name: Disp-BC-7 Type: Displacement/Rotation
*Boundary
DISCRETE_POINT_LOADING_POINT-1.SET-1, 5, 5
** Name: Disp-BC-8 Type: Displacement/Rotation
*Boundary
LOWER_LEFT_RIGHT, 2, 2
** Name: Disp-BC-9 Type: Displacement/Rotation
*Boundary
LOWER_LEFT_RIGHT, 3, 3
**
**===============================================================================
** Date line to define intial temperature fields and temperature fields due to fire.
**===============================================================================
** PREDEFINED FIELDS
**
** Name: Field-1   Type: Temperature
*Initial Conditions, type=TEMPERATURE
ALL_NODES, 20.
**
** INTERACTIONS
**
** Interaction: general_contact
*Contact, op=NEW
*Contact Inclusions, ALL EXTERIOR
*Contact Property Assignment
 ,  , INTPROP-1
**===============================================================================
**
** STEP: mech-loading: Defining mechanical loading step 1
** *DYNAMIC, EXPLICIT
** Data lines to define explicit dynamics parameters and termination time
** *BULK VISCOSITY
** Data lines to define bulk viscosity parameters
** ----------------------------------------------------------------
** Defining loading
** *CLOAD, AMPLITUDE=NAME_OF_LOAD_CURVE
** Data line to define load amplitude and location (node or element surface)
** Data lines for output request
** *OUTPUT, FIELD, TIME INTERVAL=0.1, TIME MARKS=YES
** *NODE OUTPUT
** Data line to define quantities for nodal output request
** *ELEMENT OUTPUT
** Data line to define quantities for element output request
** Data line for history output:
** *OUTPUT, HISTORY, VARIABLE=NAME_OF_VARIABLES, TIME INTERVAL=0.1
**===============================================================================
**
** STEP: mechanical_loading
**
*Step, name=mechanical_loading, nlgeom=YES
*Dynamic, Explicit
, 2.
*Bulk Viscosity
0.06, 1.2
**
** LOADS
**
** Name: CFORCE-1   Type: Concentrated force
*Cload, amplitude=LOADING_CURVE
DISCRETE_POINT_LOADING_POINT-1.SET-1, 2, -205000.
**
** OUTPUT REQUESTS
**===============================================================================
** Data lines for output request
** *OUTPUT, FIELD, TIME INTERVAL=0.1, TIME MARKS=YES
** *NODE OUTPUT
** Data line to define quantities for nodal output request
** *ELEMENT OUTPUT
** Data line to define quantities for element output request
** Data line for history output:
** *OUTPUT, HISTORY, VARIABLE=NAME_OF_VARIABLES, TIME INTERVAL=0.1
**===============================================================================
**
*Restart, write, number interval=1, time marks=NO
**
** FIELD OUTPUT: F-Output-1
**
*Output, field, time interval=0.1
*Node Output
A, U, V
**
** FIELD OUTPUT: F-Output-2
**
*Element Output, directions=YES
EVF, TEMP, TEMPMAVG
**
** HISTORY OUTPUT: H-Output-1
**
*Output, history, variable=PRESELECT
*End Step
**===============================================================================
**
** STEP: fire_heating
**
*Step, name=fire_heating, nlgeom=YES
*Dynamic, Explicit
, 8.4
*Bulk Viscosity
0.06, 1.2
**
** BOUNDARY CONDITIONS
**
** Name: Disp-BC-10 Type: Displacement/Rotation
*Boundary
DISCRETE_POINT_ENDSPRING-1.SET-1, 1, 1
** Name: Disp-BC-11 Type: Displacement/Rotation
*Boundary
DISCRETE_POINT_ENDSPRING-1.SET-1, 2, 2
** Name: Disp-BC-12 Type: Displacement/Rotation
*Boundary
DISCRETE_POINT_ENDSPRING-1.SET-1, 3, 3
** Name: Disp-BC-13 Type: Displacement/Rotation
*Boundary
TOP_PLATE_LEFT_RIGHT, 2, 2
** Name: Disp-BC-14 Type: Displacement/Rotation
*Boundary
TOP_PLATE_LEFT_RIGHT, 3, 3
**
** PREDEFINED FIELDS
**
** Name: Field-1   Type: Temperature
*Temperature, op=NEW
** Name: Field-2   Type: Temperature
*Temperature, op=NEW
_M40, 20.
** Name: Field-3   Type: Temperature
*Temperature, op=NEW, amplitude=COLUMN-TEMPERATURE
HEATZONE, 1.
**
** OUTPUT REQUESTS
**===============================================================================
** Data line to request output for fire heating steps
**===============================================================================
**
*Restart, write, number interval=1, time marks=NO
**
** FIELD OUTPUT: F-Output-3
**
*Output, field, time interval=0.1
*Node Output
A, U, V
**
** FIELD OUTPUT: F-Output-4
**
*Element Output, directions=YES
EVF, TEMP, TEMPMAVG
**
** HISTORY OUTPUT: H-Output-2
**
*Output, history, variable=PRESELECT
*End Step
