*Heading
** Job name: structural_shell_buckle Model name: structural_shell_buckle
** Generated by: Abaqus/CAE 2020
*Preprint, echo=NO, model=NO, history=NO, contact=NO
**
**==============================================================================
**          HAMK University of Applied Scince
**
**          Numerical analaysis techniques for structural fire safety design of steel structures
**          FE-SFS prject
**
**          HAMK TECH Research Unit
**
**          Readable input files
**
**==============================================================================
**
**          Case example:   Restrained column (case 3)
**          Analyses types:  Buckling Analyses
**          Element types: shell element
**==============================================================================
**===============================================================================
** PARTS
**
*Part, name=column
*End Part
**
*Part, name=discrete_point_1
*End Part
**
*Part, name=discrete_point_endspring
*End Part
**
*Part, name=discrete_point_loading_point
*End Part
**
*Part, name=lower_plate
*End Part
**
*Part, name=upper_plate
*End Part
**
**
** ASSEMBLY
**
*Assembly, name=Assembly
**
*Instance, name=column-1, part=column
        -38.,        1800.,         -60.
        -38.,        1800.,         -60., -36.9999999873119,        1800.,         -60., 89.9999992730282
*Node
      1,          76.,           0.,          25.
      2,          38.,           0.,          25.
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*Element, type=S4R
1,  1, 25, 26,  4
2, 25,  2,  3, 26
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*Nset, nset=web
    2,    3,    6,    8,    9,   14
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*Elset, elset=web
  179,  180,  181,  182,  183,  184
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*Nset, nset=upper_flange
    8,    9,   10,   11,   12,   13
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*Elset, elset=upper_flange
  707,  708,  709,  710,  711,  712
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*Nset, nset=lower_flange
    1,    2,    3,    4,    5,    6
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*Elset, elset=lower_flange
    1,    2,    3,    4,    5,    6
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** Section: Section-flange
*Shell Section, elset=lower_flange, material=steel_nonlinear
7.6, 5
** Section: Section-web
*Shell Section, elset=web, material=steel_nonlinear
4.2, 5
** Section: Section-flange
*Shell Section, elset=upper_flange, material=steel_nonlinear
7.6, 5
*End Instance
**
*Instance, name=discrete_point_endspring-1, part=discrete_point_endspring
*Node
      1,           0.,        1950.,           0.
*Nset, nset=discrete_point_endspring-1-RefPt_, internal
1,
*Nset, nset=Set-1
 1,
*Element, type=MASS, elset=Set-1_Inertia-1_
1, 1
*Mass, elset=Set-1_Inertia-1_
0.0001,
*End Instance
**
*Instance, name=discrete_point_loading_point-1, part=discrete_point_loading_point
*Node
      1,           0.,        1850.,           0.
*Nset, nset=discrete_point_loading_point-1-RefPt_, internal
1,
*Nset, nset=Set-1
 1,
*Element, type=MASS, elset=Set-1_Inertia-1_
1, 1
*Mass, elset=Set-1_Inertia-1_
0.0001,
*End Instance
**
*Instance, name=lower_plate-1, part=lower_plate
       -375.,           0.,        -100.
*Node
      1,         337.,           0.,           0.
      2,         337.,           0.,          40.
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*Element, type=S4R
 1,   1,  26, 226,  59
 2,  26,   2,  27, 226
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*Nset, nset=lower_plate, generate
   1,  429,    1
*Elset, elset=lower_plate, generate
   1,  380,    1
** Section: Section-plate
*Shell Section, elset=lower_plate, material=steel_linear
20., 5
*End Instance
**
*Instance, name=upper_plate-1, part=upper_plate
       -375.,        1800.,        -100.
*Node
      1,         337.,           0.,           0.
      2,         337.,           0.,          40.
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*Element, type=S4R
 1,   1,  26, 226,  59
 2,  26,   2,  27, 226
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*Nset, nset=upper_plate, generate
   1,  429,    1
*Elset, elset=upper_plate, generate
   1,  380,    1
** Section: Section-plate
*Shell Section, elset=upper_plate, material=steel_linear
20., 5
*End Instance
**
*Instance, name=discrete_point_1-1, part=discrete_point_1
*Node
      1,           0.,         -50.,           0.
*Nset, nset=discrete_point_1-1-RefPt_, internal
1,
*Nset, nset=Set-1
 1,
*Element, type=MASS, elset=Set-1_Inertia-1_
1, 1
*Mass, elset=Set-1_Inertia-1_
0.0001,
*End Instance
**
*Nset, nset=MPC_lower_plate, instance=lower_plate-1
   2,   5,  10,  14,  19,  20,  24,  96, 172, 174, 175, 214, 222, 223, 224
*Elset, elset=MPC_lower_plate, instance=lower_plate-1
  69,  71, 209, 211, 213, 215
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*Nset, nset=MPC_upper_plate, instance=upper_plate-1
   2,   5,  10,  14,  19,  20,  24,  96, 172, 174, 175, 214, 222, 223, 224
*Elset, elset=MPC_upper_plate, instance=upper_plate-1
  69,  71, 209, 211, 213, 215
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*Nset, nset=all_nodes, instance=column-1, generate
    1,  1365,     1
*Nset, nset=all_nodes, instance=lower_plate-1, generate
   1,  429,    1
*Nset, nset=all_nodes, instance=upper_plate-1, generate
   1,  429,    1
*Nset, nset=heatzone, instance=column-1
    1,    2,    5,    6,    7,    8
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*Elset, elset=heatzone, instance=column-1
    3,    4,    5,    6,    7,    8
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*Nset, nset=lower_left_right, instance=lower_plate-1
   3,   4,   7,   8,  12,  13
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*Elset, elset=lower_left_right, instance=lower_plate-1
  33,  34,  67,  68,  73,  90
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*Nset, nset=tie_lower_column, instance=column-1
  16,  17,  18,  19,  21,  24, 479, 480, 487, 576, 577, 578, 579, 580, 582
*Elset, elset=tie_lower_column, instance=column-1
 1061, 1062, 1063, 1064, 1071, 1072, 1251, 1252, 1253, 1254, 1255, 1256, 1259, 1260
*Nset, nset=tie_upper_column, instance=column-1
   3,   4,  14,  15,  22,  23,  26, 478, 481, 482, 483, 484, 485, 575, 581
*Elset, elset=tie_upper_column, instance=column-1
    1,    2, 1059, 1060, 1065, 1066, 1067, 1068, 1069, 1070, 1249, 1250, 1257, 1258
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*Elset, elset=_lower_plate_SNEG, internal, instance=lower_plate-1, generate
   1,  380,    1
*Surface, type=ELEMENT, name=lower_plate
_lower_plate_SNEG, SNEG
*Elset, elset=_upper_plate_SNEG, internal, instance=upper_plate-1, generate
   1,  380,    1
*Surface, type=ELEMENT, name=upper_plate
_upper_plate_SNEG, SNEG
*Surface, type=NODE, name=MPC_upper_plate_CNS_, internal
MPC_upper_plate, 1.
*Surface, type=NODE, name=MPC_lower_plate_CNS_, internal
MPC_lower_plate, 1.
*Surface, type=NODE, name=tie_upper_column_CNS_, internal
tie_upper_column, 1.
*Surface, type=NODE, name=tie_lower_column_CNS_, internal
tie_lower_column, 1.
** Constraint: Constraint-1
*MPC
BEAM, MPC_upper_plate, discrete_point_loading_point-1.Set-1
** Constraint: Constraint-2
*MPC
BEAM, MPC_lower_plate, discrete_point_1-1.Set-1
** Constraint: Constraint-3
*Tie, name=Constraint-3, adjust=yes, position tolerance=5.
tie_upper_column_CNS_, upper_plate
** Constraint: Constraint-4
*Tie, name=Constraint-4, adjust=yes, position tolerance=5.
tie_lower_column_CNS_, lower_plate
*Spring, elset=Springs-spring

32700.
*Element, type=SpringA, elset=Springs-spring
1, discrete_point_loading_point-1.1, discrete_point_endspring-1.1
*End Assembly
*Amplitude, name=column-temperature, time=TOTAL TIME
             0.,             20.,              2.,             20.,             2.6,             58.,             3.2,            95.3
            3.8,           125.6,             4.4,           160.4,              5.,           190.7,             5.6,           225.5
            6.2,           255.8,             6.8,           290.6,             7.4,           318.5,              8.,           346.4
            8.6,            372.,             9.2,           397.6,             9.8,           416.2,            10.4,           441.8
*Amplitude, name=loading_curve, time=TOTAL TIME
             0.,              0.,              2.,              1.,            10.4,              1.
**
** MATERIALS
**
*Material, name=steel_linear
*Density
 7.85e-09,
*Elastic
200000., 0.3
*Material, name=steel_nonlinear
*Density
 7.85e-09,
*Elastic
200000.,  0.3,  20.
200000.,  0.3, 100.
180000.,  0.3, 200.
160000.,  0.3, 300.
140000.,  0.3, 400.
120000.,  0.3, 500.
 62000.,  0.3, 600.
 26000.,  0.3, 700.
 18000.,  0.3, 800.
 13500.,  0.3, 900.
  9000.,  0.3,1000.
  4500.,  0.3,1100.
     1.,  0.3,1200.
*Expansion
    1.2e-05,  20.
  1.248e-05, 100.
  1.288e-05, 200.
  1.328e-05, 300.
  1.368e-05, 400.
  1.408e-05, 500.
  1.448e-05, 600.
  1.488e-05, 700.
  1.508e-05, 750.
 1.4103e-05, 800.
 1.3095e-05, 860.
 1.3409e-05, 900.
 1.4082e-05,1000.
  1.463e-05,1100.
*Plastic
  304.8,         0.,        20.
  323.1, 0.00019707,        20.
  338.3,  0.0006361,        20.
   357.,   0.001561,        20.
  370.1,   0.002507,        20.
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   12.2,       0.45,      1000.
**
** INTERACTION PROPERTIES
**
*Surface Interaction, name=IntProp-1
1.,
*Surface Behavior, pressure-overclosure=HARD
**
** BOUNDARY CONDITIONS
**
** Name: column_lower Type: Displacement/Rotation
*Boundary
discrete_point_1-1.Set-1, 1, 1
discrete_point_1-1.Set-1, 2, 2
discrete_point_1-1.Set-1, 3, 3
discrete_point_1-1.Set-1, 5, 5
** Name: column_top Type: Displacement/Rotation
*Boundary
discrete_point_loading_point-1.Set-1, 1, 1
discrete_point_loading_point-1.Set-1, 3, 3
discrete_point_loading_point-1.Set-1, 5, 5
** Name: lower_plate_left_right Type: Displacement/Rotation
*Boundary
lower_left_right, 2, 2
lower_left_right, 3, 3
**
** PREDEFINED FIELDS
**
** Name: intial_temp   Type: Temperature
*Initial Conditions, type=TEMPERATURE
all_nodes, 20.
** ----------------------------------------------------------------
**
** STEP: buckle
**
*Step, name=buckle, nlgeom=NO, perturbation
*Buckle
3, , 6, 30
**
** BOUNDARY CONDITIONS
**
** Name: column_lower Type: Displacement/Rotation
*Boundary, op=NEW, load case=1
discrete_point_1-1.Set-1, 1, 1
discrete_point_1-1.Set-1, 2, 2
discrete_point_1-1.Set-1, 3, 3
discrete_point_1-1.Set-1, 5, 5
*Boundary, op=NEW, load case=2
discrete_point_1-1.Set-1, 1, 1
discrete_point_1-1.Set-1, 2, 2
discrete_point_1-1.Set-1, 3, 3
discrete_point_1-1.Set-1, 5, 5
** Name: column_top Type: Displacement/Rotation
*Boundary, op=NEW, load case=1
discrete_point_loading_point-1.Set-1, 1, 1
discrete_point_loading_point-1.Set-1, 3, 3
discrete_point_loading_point-1.Set-1, 5, 5
*Boundary, op=NEW, load case=2
discrete_point_loading_point-1.Set-1, 1, 1
discrete_point_loading_point-1.Set-1, 3, 3
discrete_point_loading_point-1.Set-1, 5, 5
** Name: lower_plate_left_right Type: Displacement/Rotation
*Boundary, op=NEW, load case=1
lower_left_right, 2, 2
lower_left_right, 3, 3
*Boundary, op=NEW, load case=2
lower_left_right, 2, 2
lower_left_right, 3, 3
**
** LOADS
**
** Name: Load-1   Type: Concentrated force
*Cload
discrete_point_loading_point-1.Set-1, 2, -1.
**
** OUTPUT REQUESTS
**
*Restart, write, frequency=0
**
** FIELD OUTPUT: F-Output-1
**
*Output, field, variable=PRESELECT
*NODE FIL
U,
*End Step
